*Heading
 TUST revision 3: linear plane strain, verified source geometry
** Job name: tr3_circle_sq0p005 Model name: tr3_circle_sq0p005
** Generated by: Abaqus/CAE 2025
*Preprint, echo=NO, model=NO, history=NO, contact=NO
**
** PARTS
**
*Part, name=Rock
*Node
      1,           0.,  0.100000001
      2,           0.,          0.5
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*Element, type=CPE8R
   1,     1,    17,  1713,   326, 46401, 46402, 46403, 46404
   2,    17,    18,  1714,  1713, 46405, 46406, 46407, 46402
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*Nset, nset=_PickedSet3, internal, generate
      1,  138736,       1
*Elset, elset=_PickedSet3, internal, generate
     1,  45936,      1
** Section: Solid
*Solid Section, elset=_PickedSet3, material=RockMaterial
,
*End Part
**
**
** ASSEMBLY
**
*Assembly, name=Assembly
**
*Instance, name=ROCK-1, part=Rock
*End Instance
**
*Nset, nset=Bottom, instance=ROCK-1
     11,     14,     15,   1542,   1543,   1544
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*Elset, elset=Bottom, instance=ROCK-1
 34453, 34552, 34651, 34750, 34849, 34948
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*Nset, nset=Pin, instance=ROCK-1
 15,
*Elset, elset=_Sides_S4, internal, instance=ROCK-1
 11485, 11584, 11683, 11782, 11881, 11980
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*Elset, elset=_Sides_S2, internal, instance=ROCK-1, generate
 17325,  28710,     99
*Surface, type=ELEMENT, name=Sides
_Sides_S4, S4
_Sides_S2, S2
*Elset, elset=_Top_S2, internal, instance=ROCK-1, generate
   99,  5742,    99
*Elset, elset=_Top_S4, internal, instance=ROCK-1, generate
  5743,  11386,     99
*Surface, type=ELEMENT, name=Top
_Top_S2, S2
_Top_S4, S4
*End Assembly
**
** MATERIALS
**
*Material, name=RockMaterial
*Elastic
 1.333, 0.3333
**
** BOUNDARY CONDITIONS
**
** Name: BottomUy Type: Displacement/Rotation
*Step, name=Kirsch, nlgeom=NO
*Static
1., 1., 1e-05, 1.
*Boundary
ROCK-1.2, 1, 1, 0
ROCK-1.2, 2, 2, -1.665546757389347
ROCK-1.3, 1, 1, -0.4837448453113274
ROCK-1.3, 2, 2, -1.544183449962491
ROCK-1.6, 1, 1, 0.4837448453113274
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ROCK-1.138736, 2, 2, 1.544908030330298
*Output, field, frequency=99999
*Node Output
COORD, RF, U
*Element Output, directions=YES
COORD, IVOL, S
*End Step
