*Heading
 TUST revision 3: linear plane strain, verified source geometry
** Job name: tr3_tunnel_aq0p25 Model name: tr3_tunnel_aq0p25
** Generated by: Abaqus/CAE 2025
*Preprint, echo=NO, model=NO, history=NO, contact=NO
**
** PARTS
**
*Part, name=Rock
*Node
      1,   20.6071014,   10.0934477
      2,   20.8672161,    10.795207
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*Element, type=CPE6
   1,  82375,  93200,  53394, 102403, 102404, 102405
   2,  89738,  41316,  43153, 102406, 102407, 102408
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*Element, type=CPE8R
  3252,    205,  19432,  20082,  20682, 112135, 112136, 112137, 112138
  3253,   7281,  21603,  22070,  22397, 112139, 112140, 112141, 112142
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*Nset, nset=_PickedSet3, internal, generate
      1,  308058,       1
*Elset, elset=_PickedSet3, internal, generate
      1,  103253,       1
** Section: Solid
*Solid Section, elset=_PickedSet3, material=RockMaterial
,
*End Part
**
**
** ASSEMBLY
**
*Assembly, name=Assembly
**
*Instance, name=ROCK-1, part=Rock
*End Instance
**
*Nset, nset=Bottom, instance=ROCK-1
    171,    172,    173,    174,    175,    176
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*Elset, elset=Bottom, instance=ROCK-1
  3252,  3457,  3842,  3843,  3844,  5249
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*Nset, nset=Pin, instance=ROCK-1
 241,
*Elset, elset=_Sides_S1, internal, instance=ROCK-1
  3358,  3360,  3499,  3501,  3575,  3577
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*Elset, elset=_Sides_S4, internal, instance=ROCK-1
  7331, 37410
*Elset, elset=_Sides_S3, internal, instance=ROCK-1
  3749,  7374,  7631,  8902, 14564, 17539
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*Elset, elset=_Sides_S2, internal, instance=ROCK-1
 17027, 37088, 37275, 38227, 38229, 38232
*Surface, type=ELEMENT, name=Sides
_Sides_S1, S1
_Sides_S4, S4
_Sides_S2, S2
_Sides_S3, S3
*Elset, elset=_Top_S3, internal, instance=ROCK-1
  3625,  7810,  7854,  7900,  7942,  7978
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*Elset, elset=_Top_S1, internal, instance=ROCK-1
  3626,  3627,  3628,  3629,  7713,  7762
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*Elset, elset=_Top_S4, internal, instance=ROCK-1
 8902, 8904
*Surface, type=ELEMENT, name=Top
_Top_S3, S3
_Top_S1, S1
_Top_S4, S4
*Elset, elset=_Water_S4, internal, instance=ROCK-1
  3459,  3539,  3540,  3541,  3542,  3546
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*Elset, elset=_Water_S2, internal, instance=ROCK-1
  3460,  3536,  3537,  3538,  3659,  4111
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*Elset, elset=_Water_S1, internal, instance=ROCK-1
  4188,  4371,  4372, 21251, 21258, 21269
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*Elset, elset=_Water_S3, internal, instance=ROCK-1
  4503, 18393, 21173, 36998, 37039
*Surface, type=ELEMENT, name=Water
_Water_S4, S4
_Water_S2, S2
_Water_S1, S1
_Water_S3, S3
*End Assembly
**
** MATERIALS
**
*Material, name=RockMaterial
*Elastic
10000., 0.26
**
** BOUNDARY CONDITIONS
**
** Name: BottomUy Type: Displacement/Rotation
*Boundary
Bottom, 2, 2
** Name: PinUx Type: Displacement/Rotation
*Boundary
Pin, 1, 1
** ----------------------------------------------------------------
**
** STEP: Load
**
*Step, name=Load, nlgeom=NO
*Static
1., 1., 1e-05, 1.
**
** LOADS
**
** Name: PL   Type: Pressure
*Dsload
Sides, P, 10.
** Name: PT   Type: Pressure
*Dsload
Top, P, 10.
** Name: PW   Type: Pressure
*Dsload
Water, P, 2.5
**
** OUTPUT REQUESTS
**
*Restart, write, frequency=0
**
** FIELD OUTPUT: F-Output-1
**
*Output, field, frequency=99999
*Node Output
COORD, RF, U
*Element Output, directions=YES
COORD, IVOL, S
**
** HISTORY OUTPUT: H-Output-1
**
*Output, history, variable=PRESELECT
*End Step
